# OpenSim document version 30000
Model modelWithPrescribedMotion:
  credits: Priyanshu Agarwal, Craig McDonald, Troy Dennis
  length_units: meters
  force_units: N
  gravity: 0 -9.80665 0
  defaults: CoordinateActuator default: optimal_force=1000
  BodySet:
    Body ground: mass=0 mass_center=(0 0 0) inertia_xx=1 inertia_yy=1 inertia_zz=1
    Body exo_base_rail: mass=0 mass_center=(0 0 0) inertia_xx=1 inertia_yy=1 inertia_zz=1
        meshes=exo_base_rail_simple.stl
      CustomJoint groundexo_base_rail: parent_body=ground location_in_parent=(0 -0.5 0) location=(0 0 0)
        Coordinate exo_base_rail_rotation_y: motion_type=rotational default_value=0 range=(-1.570796 1.570796)
            clamped=true locked=true
        Coordinate exo_base_rail_translation_x: motion_type=translational default_value=-0.178 range=(-1 1)
            clamped=true locked=true
        Coordinate exo_base_rail_translation_z: motion_type=translational default_value=0.22 range=(-1 1) clamped=true
            locked=true
        SpatialTransform: axes_held_at_zero=(rotation1 rotation3 translation2)
          TransformAxis rotation2: coordinates=exo_base_rail_rotation_y axis=(0 1 0) LinearFunction(coefficients=1 0)
          TransformAxis translation1: coordinates=exo_base_rail_translation_x axis=(1 0 0)
              LinearFunction(coefficients=1 0)
          TransformAxis translation3: coordinates=exo_base_rail_translation_z axis=(0 0 1)
              LinearFunction(coefficients=1 0)
    Body exo_base_block: mass=0 mass_center=(0 0 0) inertia_xx=1 inertia_yy=1 inertia_zz=1
        meshes=exo_base_block_simple.stl
      CustomJoint exo_base_railexo_base_block: parent_body=exo_base_rail location_in_parent=(0 0 0) location=(0 0 0)
        Coordinate exo_base_block_translation_y: motion_type=translational default_value=0.2915286 range=(-1 1)
            clamped=true locked=true
        SpatialTransform: axes_held_at_zero=(rotation1 rotation2 rotation3 translation1 translation3)
          TransformAxis translation2: coordinates=exo_base_block_translation_y axis=(0 1 0)
              LinearFunction(coefficients=1 0)
    Body exo_upper_arm: mass=3.422227 mass_center=(0.0423847 -0.07466 -0.00583083) inertia_xx=0.03278369
        inertia_yy=0.0260098 inertia_zz=0.04034464 inertia_xy=-0.00882058 inertia_xz=-0.0003978 inertia_yz=0.001359
        meshes=exo_upper_arm_simple.stl
      CustomJoint exo_base_blockexo_upper_arm: parent_body=exo_base_block location_in_parent=(0.0604774 0 0)
          location=(0 0 0)
        Coordinate exo_upper_arm_rotation_x: motion_type=rotational default_value=-0.2094395 range=(-1.570796 1.570796)
            clamped=true locked=true
        SpatialTransform: axes_held_at_zero=(rotation2 rotation3 translation1 translation2 translation3)
          TransformAxis rotation1: coordinates=exo_upper_arm_rotation_x axis=(1 0 0) LinearFunction(coefficients=1 0)
    Body exo_forearm: mass=1.754872 mass_center=(0.0540842 -0.0377732 0.00297689) inertia_xx=0.01371556
        inertia_yy=0.02047318 inertia_zz=0.01731919 inertia_xy=-0.00398585 inertia_xz=-0.00095332 inertia_yz=0.00071175
        meshes=exo_forearm_simple.stl
      CustomJoint exo_upper_armexo_forearm: parent_body=exo_upper_arm location_in_parent=(0.13335 -0.0762 0)
          location=(0 0 0)
        Coordinate exo_forearm_rotation_z: motion_type=rotational default_value=0 range=(-1.570796 0) clamped=true
            prescribed=true
          prescribed_function: SimmSpline: x=(0 0.05 0.1 0.15 0.2 0.25 0.3 0.35 0.4 0.45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)
              y=(-0.174172 -0.17417 -0.174173 -0.174173 -0.174173 -0.174173 -0.174172 -0.174175 -0.174172 -0.174173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)
        SpatialTransform: axes_held_at_zero=(rotation1 rotation2 translation1 translation2 translation3)
          TransformAxis rotation3: coordinates=exo_forearm_rotation_z axis=(0 0 1) LinearFunction(coefficients=1 0)
    Body exo_counterweight: mass=5.35239 mass_center=(0 0 0) inertia_xx=0.00700388 inertia_yy=0.00700388
        inertia_zz=0.01317901 meshes=exo_counterweight_simple.stl
      CustomJoint exo_forearm_exo_counterweight: parent_body=exo_forearm location_in_parent=(-0.1143 0 0.2483721)
          location=(0 0 0)
        Coordinate exo_counterweight_translation_x: motion_type=translational default_value=0 range=(-0.076 0)
            clamped=true locked=true
        SpatialTransform: axes_held_at_zero=(rotation1 rotation2 rotation3 translation2 translation3)
          TransformAxis translation1: coordinates=exo_counterweight_translation_x axis=(1 0 0)
              LinearFunction(coefficients=1 0)
    Body exo_wrist_base: mass=1.456131 mass_center=(-0.00401306 -0.00116828 -0.00011279) inertia_xx=0.01747099
        inertia_yy=0.00904374 inertia_zz=0.00895693 inertia_xy=6.494e-5 inertia_xz=8.48e-6 inertia_yz=-8.51e-6
        meshes=exo_wrist_base_simple.stl
      CustomJoint exo_forearmexo_wrist_base: parent_body=exo_forearm location_in_parent=(0.159385 0 0) location=(0 0 0)
        Coordinate exo_wrist_base_rotation_x: motion_type=rotational default_value=0 range=(-2.094395 2.094395)
            clamped=true prescribed=true
          prescribed_function: SimmSpline: x=(0 0.05 0.1 0.15 0.2 0.25 0.3 0.35 0.4 0.45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)
              y=(0.000300382 0.000216631 0.000221074 0.00022062 0.000221492 0.000220994 0.000221282 0.000219355 0.000222636 0.000222167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)
        SpatialTransform: axes_held_at_zero=(rotation2 rotation3 translation1 translation2 translation3)
          TransformAxis rotation1: coordinates=exo_wrist_base_rotation_x axis=(1 0 0) LinearFunction(coefficients=1 0)
    Body exo_wrist_slider_1: mass=0.05994136 mass_center=(0 0 -0.0086891) inertia_xx=9.61e-6 inertia_yy=9.89e-6
        inertia_zz=8.9e-6 meshes=exo_wrist_slider_simple.stl
      CustomJoint exo_wrist_base_exo_wrist_slider_1: parent_body=exo_wrist_base
          location_in_parent=(0 0.1014906 0.03664042) orientation_in_parent=(0.09451667 0 0) location=(0 0 0)
        Coordinate exo_wrist_slider_1_rotation_z: motion_type=rotational default_value=-0.406633
            range=(-2.094395 2.094395) clamped=true is_free_to_satisfy_constraints=true
        SpatialTransform: axes_held_at_zero=(rotation1 rotation2 translation1 translation2 translation3)
          TransformAxis rotation3: coordinates=exo_wrist_slider_1_rotation_z axis=(0 0 1)
              LinearFunction(coefficients=1 0)
    Body exo_wrist_slider_2: mass=0.05994136 mass_center=(0 0 -0.0086891) inertia_xx=9.61e-6 inertia_yy=9.89e-6
        inertia_zz=8.9e-6 meshes=exo_wrist_slider_simple.stl
      CustomJoint exo_wrist_base_exo_wrist_slider_2: parent_body=exo_wrist_base
          location_in_parent=(0 -0.01901377 -0.1062137) orientation_in_parent=(-1.999878 0 0) location=(0 0 0)
        Coordinate exo_wrist_slider_2_rotation_z: motion_type=rotational default_value=-0.406633
            range=(-2.094395 2.094395) clamped=true is_free_to_satisfy_constraints=true
        SpatialTransform: axes_held_at_zero=(rotation1 rotation2 translation1 translation2 translation3)
          TransformAxis rotation3: coordinates=exo_wrist_slider_2_rotation_z axis=(0 0 1)
              LinearFunction(coefficients=1 0)
    Body exo_wrist_slider_3: mass=0.05994136 mass_center=(0 0 -0.0086891) inertia_xx=9.61e-6 inertia_yy=9.89e-6
        inertia_zz=8.9e-6 meshes=exo_wrist_slider_simple.stl
      CustomJoint exo_wrist_base_exo_wrist_slider_3: parent_body=exo_wrist_base
          location_in_parent=(0 -0.08247684 0.06957324) orientation_in_parent=(2.188912 0 0) location=(0 0 0)
        Coordinate exo_wrist_slider_3_rotation_z: motion_type=rotational default_value=-0.406633
            range=(-2.094395 2.094395) clamped=true is_free_to_satisfy_constraints=true
        SpatialTransform: axes_held_at_zero=(rotation1 rotation2 translation1 translation2 translation3)
          TransformAxis rotation3: coordinates=exo_wrist_slider_3_rotation_z axis=(0 0 1)
              LinearFunction(coefficients=1 0)
    Body exo_wrist_rail_1: mass=0.1482 mass_center=(-0.0880388 2.22e-6 0.00949584) inertia_xx=2.001e-5
        inertia_yy=0.00146169 inertia_zz=0.00144578 inertia_xy=-5e-8 inertia_xz=-0.00012515
        meshes=exo_wrist_rail_simple.stl
      CustomJoint exo_wrist_slider_1_exo_wrist_rail_1: parent_body=exo_wrist_slider_1
          location_in_parent=(0 0 -0.027282) location=(0 0 0)
        Coordinate exo_wrist_rail_1_translation_x: motion_type=translational default_value=0.1305 range=(0.06 0.1305)
            clamped=true prescribed=true
          prescribed_function: SimmSpline: x=(0 0.05 0.1 0.15 0.2 0.25 0.3 0.35 0.4 0.45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)
              y=(0.118296 0.118415 0.118717 0.118994 0.119241 0.119487 0.119727 0.119999 0.120229 0.120462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)
        SpatialTransform: axes_held_at_zero=(rotation1 rotation2 rotation3 translation2 translation3)
          TransformAxis translation1: coordinates=exo_wrist_rail_1_translation_x axis=(1 0 0)
              LinearFunction(coefficients=1 0)
    Body exo_wrist_rail_2: mass=0.1482 mass_center=(-0.0880388 2.22e-6 0.00949584) inertia_xx=2.001e-5
        inertia_yy=0.00146169 inertia_zz=0.00144578 inertia_xy=-5e-8 inertia_xz=-0.00012515
        meshes=exo_wrist_rail_simple.stl
      CustomJoint exo_wrist_slider_2_exo_wrist_rail_2: parent_body=exo_wrist_slider_2
          location_in_parent=(0 0 -0.027282) location=(0 0 0)
        Coordinate exo_wrist_rail_2_translation_x: motion_type=translational default_value=0.1305 range=(0.06 0.1305)
            clamped=true prescribed=true
          prescribed_function: SimmSpline: x=(0 0.05 0.1 0.15 0.2 0.25 0.3 0.35 0.4 0.45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)
              y=(0.129827 0.12981 0.129756 0.129708 0.129648 0.129584 0.129512 0.12943 0.129345 0.129244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)
        SpatialTransform: axes_held_at_zero=(rotation1 rotation2 rotation3 translation2 translation3)
          TransformAxis translation1: coordinates=exo_wrist_rail_2_translation_x axis=(1 0 0)
              LinearFunction(coefficients=1 0)
    Body exo_wrist_rail_3: mass=0.1482 mass_center=(-0.0880388 2.22e-6 0.00949584) inertia_xx=2.001e-5
        inertia_yy=0.00146169 inertia_zz=0.00144578 inertia_xy=-5e-8 inertia_xz=-0.00012515
        meshes=exo_wrist_rail_simple.stl
      CustomJoint exo_wrist_slider_3_exo_wrist_rail_3: parent_body=exo_wrist_slider_3
          location_in_parent=(0 0 -0.027282) location=(0 0 0)
        Coordinate exo_wrist_rail_3_translation_x: motion_type=translational default_value=0.1305 range=(0.06 0.1305)
            clamped=true prescribed=true
          prescribed_function: SimmSpline: x=(0 0.05 0.1 0.15 0.2 0.25 0.3 0.35 0.4 0.45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)
              y=(0.129848 0.129827 0.129792 0.129753 0.129689 0.129633 0.129565 0.129488 0.129408 0.12931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)
        SpatialTransform: axes_held_at_zero=(rotation1 rotation2 rotation3 translation2 translation3)
          TransformAxis translation1: coordinates=exo_wrist_rail_3_translation_x axis=(1 0 0)
              LinearFunction(coefficients=1 0)
    Body exo_wrist_ring: mass=0.2036033 mass_center=(0.0460489 -0.0598681 -0.00647995) inertia_xx=0.00108391
        inertia_yy=0.00082063 inertia_zz=0.00158304 inertia_xy=-0.00064377 inertia_xz=-8.44e-6 inertia_yz=2.664e-5
        meshes=exo_wrist_ring_simple.stl
      CustomJoint exo_wrist_rail_1_exo_wrist_ring: parent_body=exo_wrist_rail_1 location_in_parent=(0 0 0)
          location=(0 0 0)
        Coordinate exo_wrist_ring_rotation_x: motion_type=rotational default_value=-0.006659023
            range=(-2.094395 2.094395) clamped=true is_free_to_satisfy_constraints=true
        Coordinate exo_wrist_ring_rotation_y: motion_type=rotational default_value=-0.002867572
            range=(-2.094395 2.094395) clamped=true is_free_to_satisfy_constraints=true
        Coordinate exo_wrist_ring_rotation_z: motion_type=rotational default_value=0.4066234 range=(-2.094395 2.094395)
            clamped=true is_free_to_satisfy_constraints=true
        SpatialTransform: axes_held_at_zero=(translation1 translation2 translation3)
          TransformAxis rotation1: coordinates=exo_wrist_ring_rotation_x axis=(1 0 0) LinearFunction(coefficients=1 0)
          TransformAxis rotation2: coordinates=exo_wrist_ring_rotation_y axis=(0 1 0) LinearFunction(coefficients=1 0)
          TransformAxis rotation3: coordinates=exo_wrist_ring_rotation_z axis=(0 0 1) LinearFunction(coefficients=1 0)
    Body exo_handle: mass=0.161258 mass_center=(0 0.0684424 0) inertia_xx=0.00103949 inertia_yy=2.597e-5
        inertia_zz=0.00103949 meshes=exo_handle_simple.stl
      CustomJoint exo_wrist_ring_exo_handle: parent_body=exo_wrist_ring
          location_in_parent=(0.09008393 -0.06387859 0.00332063)
          orientation_in_parent=(-0.08202798 -0.02981343 0.3478423) location=(0 0 0)
        Coordinate exo_handle_translation_x: motion_type=translational default_value=0.022225 range=(0 0.04445)
            clamped=true locked=true
        SpatialTransform: axes_held_at_zero=(rotation1 rotation2 rotation3 translation2 translation3)
          TransformAxis translation1: coordinates=exo_handle_translation_x axis=(1 0 0)
              LinearFunction(coefficients=1 0)
  ConstraintSet:
    PointConstraint: body_1=exo_wrist_rail_2 body_2=exo_wrist_ring location_body_1=(0 0 0)
        location_body_2=(0.02712993 -0.07453888 -0.04579693)
    PointConstraint: body_1=exo_wrist_rail_3 body_2=exo_wrist_ring location_body_1=(0 0 0)
        location_body_2=(0.02712993 -0.07453888 0.04579693)
  ForceSet:
    CoordinateLimitForce exo_forearm_rotation_z_damping: isDisabled=true coordinate=exo_forearm_rotation_z
        upper_stiffness=1e-8 [N*m/degree] upper_limit=190 [degrees] lower_stiffness=1e-8 [N*m/degree]
        lower_limit=190 [degrees] damping=0.01 transition=1 [degrees]
    CoordinateLimitForce exo_forearm_rotation_z_stiffness: isDisabled=true coordinate=exo_forearm_rotation_z
        upper_stiffness=100 upper_limit=0 lower_stiffness=100 lower_limit=-90 damping=0 transition=1
    CoordinateLimitForce exo_wrist_base_rotation_x_damping: isDisabled=true coordinate=exo_wrist_base_rotation_x
        upper_stiffness=1e-8 upper_limit=190 lower_stiffness=1e-8 lower_limit=190 damping=0.01 transition=1
    CoordinateLimitForce exo_wrist_base_rotation_x_stiffness: isDisabled=true coordinate=exo_wrist_base_rotation_x
        upper_stiffness=100 upper_limit=120 lower_stiffness=100 lower_limit=-120 damping=0 transition=1
    CoordinateLimitForce exo_wrist_slider_1_rotation_z_damping: isDisabled=true
        coordinate=exo_wrist_slider_1_rotation_z upper_stiffness=1e-8 upper_limit=190 lower_stiffness=1e-8
        lower_limit=190 damping=0.001 transition=1
    CoordinateLimitForce exo_wrist_slider_1_rotation_z_stiffness: isDisabled=true
        coordinate=exo_wrist_slider_1_rotation_z upper_stiffness=100 upper_limit=0 lower_stiffness=100 lower_limit=-80
        damping=0 transition=1
    CoordinateLimitForce exo_wrist_slider_2_rotation_z_damping: isDisabled=true
        coordinate=exo_wrist_slider_2_rotation_z upper_stiffness=1e-8 upper_limit=190 lower_stiffness=1e-8
        lower_limit=190 damping=0.001 transition=1
    CoordinateLimitForce exo_wrist_slider_2_rotation_z_stiffness: isDisabled=true
        coordinate=exo_wrist_slider_2_rotation_z upper_stiffness=100 upper_limit=0 lower_stiffness=100 lower_limit=-80
        damping=0 transition=1
    CoordinateLimitForce exo_wrist_slider_3_rotation_z_damping: isDisabled=true
        coordinate=exo_wrist_slider_3_rotation_z upper_stiffness=1e-8 upper_limit=190 lower_stiffness=1e-8
        lower_limit=190 damping=0.001 transition=1
    CoordinateLimitForce exo_wrist_slider_3_rotation_z_stiffness: isDisabled=true
        coordinate=exo_wrist_slider_3_rotation_z upper_stiffness=100 upper_limit=0 lower_stiffness=100 lower_limit=-80
        damping=0 transition=1
    CoordinateLimitForce exo_wrist_rail_1_translation_x_damping: isDisabled=true
        coordinate=exo_wrist_rail_1_translation_x upper_stiffness=1e-8 upper_limit=190 lower_stiffness=1e-8
        lower_limit=190 damping=0.1 transition=1
    CoordinateLimitForce exo_wrist_rail_1_translation_x_stiffness: isDisabled=true
        coordinate=exo_wrist_rail_1_translation_x upper_stiffness=1000 upper_limit=0.145 lower_stiffness=1000
        lower_limit=0.0599 damping=0 transition=0.001
    CoordinateLimitForce exo_wrist_rail_2_translation_x_damping: isDisabled=true
        coordinate=exo_wrist_rail_2_translation_x upper_stiffness=1e-8 upper_limit=190 lower_stiffness=1e-8
        lower_limit=190 damping=0.1 transition=1
    CoordinateLimitForce exo_wrist_rail_2_translation_x_stiffness: isDisabled=true
        coordinate=exo_wrist_rail_2_translation_x upper_stiffness=1000 upper_limit=0.145 lower_stiffness=1000
        lower_limit=0.0599 damping=0 transition=0.001
    CoordinateLimitForce exo_wrist_rail_3_translation_x_damping: isDisabled=true
        coordinate=exo_wrist_rail_3_translation_x upper_stiffness=1e-8 upper_limit=190 lower_stiffness=1e-8
        lower_limit=190 damping=0.1 transition=1
    CoordinateLimitForce exo_wrist_rail_3_translation_x_stiffness: isDisabled=true
        coordinate=exo_wrist_rail_3_translation_x upper_stiffness=1000 upper_limit=0.145 lower_stiffness=1000
        lower_limit=0.0599 damping=0 transition=0.001
    CoordinateLimitForce exo_wrist_ring_rotation_x_damping: isDisabled=true coordinate=exo_wrist_ring_rotation_x
        upper_stiffness=1e-8 upper_limit=190 lower_stiffness=1e-8 lower_limit=190 damping=0.001 transition=1
    CoordinateLimitForce exo_wrist_ring_rotation_y_damping: isDisabled=true coordinate=exo_wrist_ring_rotation_y
        upper_stiffness=1e-8 upper_limit=190 lower_stiffness=1e-8 lower_limit=190 damping=0.001 transition=1
    CoordinateLimitForce exo_wrist_ring_rotation_z_damping: isDisabled=true coordinate=exo_wrist_ring_rotation_z
        upper_stiffness=1e-8 upper_limit=190 lower_stiffness=1e-8 lower_limit=190 damping=0.001 transition=1
    CoordinateActuator exo_forearm_rotation_z_actuator: coordinate=exo_forearm_rotation_z optimal_force=1
    CoordinateActuator exo_wrist_base_rotation_x_actuator: coordinate=exo_wrist_base_rotation_x optimal_force=1
    CoordinateActuator exo_wrist_slider_1_rotation_z_actuator: coordinate=exo_wrist_slider_1_rotation_z optimal_force=1
    CoordinateActuator exo_wrist_slider_2_rotation_z_actuator: coordinate=exo_wrist_slider_1_rotation_z optimal_force=1
    CoordinateActuator exo_wrist_slider_3_rotation_z_actuator: coordinate=exo_wrist_slider_1_rotation_z optimal_force=1
    CoordinateActuator exo_wrist_rail_1_translation_x_actuator: coordinate=exo_wrist_rail_1_translation_x
        optimal_force=1
    CoordinateActuator exo_wrist_rail_2_translation_x_actuator: coordinate=exo_wrist_rail_2_translation_x
        optimal_force=1
    CoordinateActuator exo_wrist_rail_3_translation_x_actuator: coordinate=exo_wrist_rail_3_translation_x
        optimal_force=1
    CoordinateActuator exo_wrist_ring_rotation_x_actuator: coordinate=exo_wrist_ring_rotation_x optimal_force=1
    CoordinateActuator exo_wrist_ring_rotation_y_actuator: coordinate=exo_wrist_ring_rotation_y optimal_force=1
    CoordinateActuator exo_wrist_ring_rotation_z_actuator: coordinate=exo_wrist_ring_rotation_z optimal_force=1
  MarkerSet:
    Marker exo_elbow_center: exo_forearm (0 0 0) fixed=true
    Marker exo_forearm_center: exo_wrist_base (0 0 0) fixed=true
    Marker exo_wrist_center: exo_wrist_ring (0.0180866 -0.0496926 0)
    Marker exo_hand_center: exo_handle (0 0.0381 0) fixed=true
  ControllerSet Controllers:
    PrescribedController
