# OpenSim document version 30000
AnalyzeTool MAHI_EXO_II:
  replace_force_set: false
  results_directory: C:/Users/pa20/Google Drive/Rice/OpenSim_Modeling/MAHI_EXO_II_only/Setup_Files/../Results_FK
  output_precision: 8
  initial_time: 0
  final_time: 30
  solve_for_equilibrium_for_auxiliary_states: false
  maximum_number_of_integrator_steps: 20000
  maximum_integrator_step_size: 1
  minimum_integrator_step_size: 1e-8
  integrator_error_tolerance: 1e-5
  lowpass_cutoff_frequency_for_coordinates: -1
  AnalysisSet Analyses:
    PointKinematics: start_time=0 end_time=30 step_interval=1 in_degrees=true body_name=exo_forearm
        relative_to_body_name=ground point_name=exo_elbow_center point=(0 0 0)
    PointKinematics: start_time=0 end_time=30 step_interval=1 in_degrees=true body_name=exo_forearm
        relative_to_body_name=ground point_name=exo_forearm_center point=(0.1524 0 0)
    PointKinematics: start_time=0 end_time=30 step_interval=1 in_degrees=true body_name=exo_wrist_ring
        relative_to_body_name=ground point_name=exo_wrist_center point=(0.0182836 -0.0496209 0)
    PointKinematics: start_time=0 end_time=30 step_interval=1 in_degrees=true body_name=exo_handle
        relative_to_body_name=ground point_name=exo_hand_center point=(0 0 0)
