# OpenSim document version 30000
ForwardTool modelWithPrescribedMotion:
  replace_force_set: false
  results_directory: ../Results_FD
  output_precision: 8
  initial_time: 0
  final_time: 8
  solve_for_equilibrium_for_auxiliary_states: false
  maximum_number_of_integrator_steps: 20000
  maximum_integrator_step_size: 0.001
  minimum_integrator_step_size: 1e-8
  integrator_error_tolerance: 1e-8
  use_specified_dt: false
  AnalysisSet Analyses:
    JointReaction: start_time=0 end_time=8 step_interval=1 in_degrees=true joint_names=ALL apply_on_bodies=child
        express_in_frame=child
  ControllerSet Controllers:
    ControlSetController: controls_file=(C:/Users/pa20/Google Drive/Rice/OpenSim_Modeling/MAHI_EXO_II_only/Setup_Files/../Results_FD/modelWithPrescribedMotion_controls.sto)
