# OpenSim document version 30000
InverseKinematicsTool:
  results_directory: ./
  constraint_weight: Inf
  accuracy: 1e-5
  marker_file: ../Results_IK/efe/marker_data.trc
  coordinate_file: ../Results_IK/efe/robot_motion.mot
  time_range: 0 7.999
  report_errors: true
  report_marker_locations: false
  IKTaskSet:
    IKMarkerTask exo_elbow_center: apply=true weight=0.0001
    IKMarkerTask exo_forearm_center: apply=true weight=0
    IKMarkerTask exo_wrist_center: apply=true weight=0
    IKMarkerTask exo_hand_center: apply=true weight=0
    IKCoordinateTask [values shared by the 5 below unless stated]: apply=true weight=1 value_type=from_file value=0
    IKCoordinateTask exo_forearm_rotation_z
    IKCoordinateTask exo_wrist_base_rotation_x
    IKCoordinateTask exo_wrist_rail_1_translation_x
    IKCoordinateTask exo_wrist_rail_2_translation_x
    IKCoordinateTask exo_wrist_rail_3_translation_x
